# LAMMPS / CASPULE input — type-1 monomers diffuse and dimerize via
# `fix bond/create`. The dimer = a connected pair of type-1 atoms with
# one bond of type 1. Used by the composite as the "spatial dynamics"
# half of the simulation; the detector will pull dimers out of this
# pool and hand them to NFSim as a single Dimer molecule.
units lj
atom_style bond
boundary p p p
neighbor 0.5 bin
neigh_modify every 1 delay 0 check yes
region box block 0 8 0 8 0 8
create_box 1 box bond/types 1 extra/bond/per/atom 4 extra/special/per/atom 50
mass 1 1.0
lattice sc 1.6
create_atoms 1 box
pair_style soft 2.0
pair_coeff * * 30.0
bond_style harmonic
bond_coeff 1 5.0 1.5
minimize 1e-4 1e-4 100 100
fix nve all nve/limit 0.05
fix lan all langevin 0.4 0.4 1.0 12345
timestep 0.005
fix mkbnd all bond/create 1 1 1 1.8 1 iparam 1 1 jparam 1 1
thermo 5
