# LAMMPS / CASPULE input — type-1 monomers polymerize into branched
# clusters. Each atom can carry up to 4 bonds (`iparam 4 1 jparam 4 1`),
# and bond formation is attempted every 10 timesteps so that clusters
# grow on a time-scale the detector can sample. Used as the spatial
# substrate for the multi-rule "polymer fractionation" experiment, where
# the detector pulls Dimers and Trimers into NFSim while leaving larger
# Polymer networks in the spatial pool for visualisation.
units lj
atom_style bond
boundary p p p
neighbor 0.5 bin
neigh_modify every 1 delay 0 check yes
region box block 0 6 0 6 0 6
create_box 1 box bond/types 1 extra/bond/per/atom 4 extra/special/per/atom 50
mass 1 1.0
lattice sc 1.6
create_atoms 1 box
pair_style soft 2.0
pair_coeff * * 30.0
bond_style harmonic
bond_coeff 1 5.0 1.5
minimize 1e-4 1e-4 100 100
fix nve all nve/limit 0.05
fix lan all langevin 0.4 0.4 1.0 12345
timestep 0.005
fix mkbnd all bond/create 10 1 1 1.8 1 iparam 4 1 jparam 4 1
thermo 5
